wx := 200
wy := -50
wz := 400
θ := -30 deg
l := 180
d := 100
h := 20
ry := [cos(θ), 0, sin(θ); 0, 1, 0; -sin(θ), 0, cos(θ)]
ry = [0.866025, 0, -0.5; 0, 1, 0; 0.5, 0, 0.866025]
no := [0; 0; 1]
n := ry*no
n = [-0.5; 0; 0.866025]
w := [200; -50; 400]
plocal := [-94; -43; 0]
probot := ry*plocal + w
offset_tcp_rec := (20/2)*n
offset_tcp_L := (30/2)*n
offset_app := d*n
probot = [118.594; -93; 353]
offset_w := l*n
TCP := probot + offset_tcp_L
TCP = [111.094; -93; 365.99]
WRIST := TCP - offset_w
WRIST = [201.094; -93; 210.106]
APPROACH := TCP + offset_app
APPROACH = [61.0936; -93; 452.593]
